# OpenSim document version 40500
IMUInverseKinematicsTool:
  results_directory: E:\data\opensim\self_defination_model\orientation_file
  time_range: 0 2.826923
  output_motion_file: greeting_motion.mot
  report_errors: false
  sensor_to_opensim_rotations: 1.570796 1.570796 0
  orientations_file: greeting_orientation.sto
  OrientationWeightSet orientation_weights:
    OrientationWeight torso_imu: weight=1
    OrientationWeight humerus_r_imu: weight=1
    OrientationWeight humerus_l_imu: weight=1
    OrientationWeight radius_r_imu: weight=1
    OrientationWeight radius_l_imu: weight=1
    OrientationWeight pelvis_imu: weight=1
    OrientationWeight femur_r_imu: weight=1
    OrientationWeight femur_l_imu: weight=1
    OrientationWeight tibia_r_imu: weight=1
    OrientationWeight tibia_l_imu: weight=1
