# OpenSim document version 40500
MarkerSet:
  Marker RC: ground (-0.005086553 0.1185607 0.07733257)
  Marker LC: ground (0.002190277 0.1191841 -0.07769045)
  Marker RT: ground (0.01692232 0.6367846 0.1057876)
  Marker LT: ground (0.007885422 0.6389195 -0.1058782)
  Marker WAS: ground (0.0103293 1.0151 0)
  Marker CHS: ground (0.00895668 1.1881 0)
  Marker RF: ground (-0.08060034 0.8980992 0.2515544)
  Marker LF: ground (-0.0806003 0.898099 -0.251554)
  Marker RU: ground (-0.1081324 1.232327 0.244686)
  Marker LU: ground (-0.108132 1.23233 -0.244686)
